*Heading
** Job name: Job-1 Model name: Model-1
** Generated by: Abaqus/CAE 6.14-1
*Preprint, echo=NO, model=NO, history=NO, contact=NO
**
** PARTS
**
*Part, name=step_file-1
*End Part
**
*Part, name=step_file-2
*End Part
**
**
** ASSEMBLY
**
*Assembly, name=Assembly
**
*Instance, name=step_file-1-1, part=step_file-1
*Node
      1,           1.,           0.,          2.5
      2,   0.90152663, 0.0131592453,          2.5
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*Element, type=S4R
  1,   1,   2,  15,  14
  2,   2,   3,  16,  15
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*Nset, nset=Set-1, generate
   1,  663,    1
*Elset, elset=Set-1, generate
   1,  600,    1
** Section: Section-1
*Shell Section, elset=Set-1, material=Al
0.01, 5
*End Instance
**
*Instance, name=step_file-2-1, part=step_file-2
*Node
      1,           0.,           0.,          2.5
      2,  0.010939288,   -0.0176994,          2.5
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*Element, type=S4R
  1,   1,   2,  15,  14
  2,   2,   3,  16,  15
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*Nset, nset=Set-1, generate
   1,  663,    1
*Elset, elset=Set-1, generate
   1,  600,    1
** Section: Section-1
*Shell Section, elset=Set-1, material=Al
0.01, 5
*End Instance
**
*Nset, nset=Set-3, instance=step_file-1-1, generate
  13,  663,   13
*Elset, elset=Set-3, instance=step_file-1-1, generate
  12,  600,   12
*Nset, nset=Set-4, instance=step_file-2-1, generate
   1,  651,   13
*Elset, elset=Set-4, instance=step_file-2-1, generate
   1,  589,   12
*Nset, nset=Set-5, instance=step_file-1-1, generate
 651,  663,    1
*Nset, nset=Set-5, instance=step_file-2-1, generate
 651,  663,    1
*Elset, elset=Set-5, instance=step_file-1-1, generate
 589,  600,    1
*Elset, elset=Set-5, instance=step_file-2-1, generate
 589,  600,    1
*Nset, nset=Set-6, instance=step_file-1-1, generate
   1,  651,   13
*Elset, elset=Set-6, instance=step_file-1-1, generate
   1,  589,   12
*Nset, nset=Set-7, instance=step_file-2-1, generate
  13,  663,   13
*Elset, elset=Set-7, instance=step_file-2-1, generate
  12,  600,   12
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*Surface, type=NODE, name=Set-3_CNS_, internal
Set-3, 1.
*Surface, type=NODE, name=Set-4_CNS_, internal
Set-4, 1.
*Surface, type=NODE, name=Set-6_CNS_, internal
Set-6, 1.
*Surface, type=NODE, name=Set-7_CNS_, internal
Set-7, 1.
** Constraint: Constraint-2
*Tie, name=Constraint-2, adjust=yes
Set-4_CNS_, Set-3_CNS_
** Constraint: Constraint-3
*Tie, name=Constraint-3, adjust=yes
Set-7_CNS_, Set-6_CNS_
*End Assembly
**
** MATERIALS
**
*Material, name=Al
*Density
2700.,
*Elastic
 6.89e+10, 0.33
**
** BOUNDARY CONDITIONS
**
** Name: BC-1 Type: Displacement/Rotation
*Boundary
Set-5, 1, 1
Set-5, 2, 2
Set-5, 3, 3
Set-5, 4, 4
Set-5, 5, 5
Set-5, 6, 6
** ----------------------------------------------------------------
**
** STEP: Step-1
**
*Step, name=Step-1, nlgeom=NO, perturbation
*Frequency, eigensolver=Lanczos, acoustic coupling=on, normalization=displacement
6, , , , ,
**
** OUTPUT REQUESTS
**
*Restart, write, frequency=0
**
** FIELD OUTPUT: F-Output-1
**
*Output, field, variable=PRESELECT
*End Step
