*Heading
** Job name: Job-1 Model name: Model-1
** Generated by: Abaqus/CAE 6.14-1
*Preprint, echo=NO, model=NO, history=NO, contact=NO
**
** PARTS
**
*Part, name=Part-1
*End Part
**
**
** ASSEMBLY
**
*Assembly, name=Assembly
**
*Instance, name=Part-1-1, part=Part-1
*Node
      1, -0.0179999992, 0.00063850783
      2, -0.00499694329, 0.000674808049
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*Element, type=CPS4R
   1,   15,   16,  385,  372
   2,   16,   17,  384,  385
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*Nset, nset=Set-1, generate
    1,  2182,     1
*Elset, elset=Set-1, generate
    1,  2020,     1
** Section: Section-1
*Solid Section, elset=Set-1, material=Al
1.,
*End Instance
**
*Nset, nset=Set-1, instance=Part-1-1
   1,   5,   9,  14,  15,  16
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*Elset, elset=Set-1, instance=Part-1-1
   1,   2,   3,   4,   5,   6
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*Elset, elset=_Surf-1_S2, internal, instance=Part-1-1
 1131, 1132, 1133, 1134, 1135, 1136
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*Elset, elset=_Surf-1_S1, internal, instance=Part-1-1
 1148, 1865, 1866, 1867, 1868, 1869, 1870, 1871, 1872, 1873, 1874, 1875, 1876
*Surface, type=ELEMENT, name=Surf-1
_Surf-1_S2, S2
_Surf-1_S1, S1
*Elset, elset=_Surf-2_S2, internal, instance=Part-1-1
 1131, 1132, 1133, 1134, 1135, 1136
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*Elset, elset=_Surf-2_S1, internal, instance=Part-1-1
 1148, 1865, 1866, 1867, 1868, 1869, 1870, 1871, 1872, 1873, 1874, 1875, 1876
*Surface, type=ELEMENT, name=Surf-2
_Surf-2_S2, S2
_Surf-2_S1, S1
*End Assembly
*Amplitude, name=Amp-1
             0.,              0.,              1.,              1.
**
** MATERIALS
**
*Material, name=Al
*Elastic
 6.865e+10, 0.2
*Plastic
 2.383e+08,    0.
  2.54e+08, 0.007
**
** BOUNDARY CONDITIONS
**
** Name: BC-1 Type: Displacement/Rotation
*Boundary
Set-1, 1, 1
Set-1, 2, 2
Set-1, 6, 6
** ----------------------------------------------------------------
**
** STEP: Step-1
**
*Step, name=Step-1, nlgeom=NO
*Static
0.1, 1., 1e-05, 0.1
**
** LOADS
**
** Name: Load-1   Type: Pressure
*Dsload
Surf-2, P, -1.19e+08
**
** OUTPUT REQUESTS
**
*Restart, write, frequency=0
**
** FIELD OUTPUT: F-Output-1
**
*Output, field, variable=PRESELECT
**
** HISTORY OUTPUT: H-Output-1
**
*Output, history, variable=PRESELECT
*End Step
