*HEADING
FIVE SPAN CONTINUOUS BEAM UNDER JET NOISE
*RESTART,WRITE,FREQUENCY=999
*NODE
 1,0,0
 21,5
*NGEN
 1,21
*ELEMENT,TYPE=B23
 1,1,2
*ELGEN,ELSET=ALL
 1,20
*BEAM GENERAL SECTION,SECTION=GENERAL,DENSITY=0.0001,ELSET=ALL
 10000.,1.,0.,1.,1.
 0,0,-1
 1,1
*NSET,NSET=SUPP,GENERATE
 1,21,4
*NSET,NSET=ALL,GENERATE
 1,21
*NSET,NSET=N2
2,
*BOUNDARY
 SUPP,2
 ALL,1
*STEP
*FREQUENCY, eigensolver=lanczos
20, ,
*EL PRINT,FREQUENCY=0
SF,
*NODE PRINT,FREQUENCY=0
U,
*MODAL FILE
*OUTPUT,FIELD
*OUTPUT,HISTORY
*MODAL OUTPUT,VARIABLE=ALL
*OUTPUT, FIELD, VARIABLE=PRESELECT
*END STEP
**
**
*PSD-DEFINITION,NAME=PSD
6.2831853,0.0,0.0001
6.2831853,0.0,1000.0
*STEP
*RANDOM RESPONSE
 0.1,20.,20,,1
*modal damping, modal=direct
 1,20,0.01
*select eigenmodes, generate
1, 20
*CLOAD, LOAD CASE=1
 ALL,2,.25
*CORRELATION,TYPE=MOVING NOISE
1,6.0,0.0,0.0,PSD
*EL PRINT,FREQUENCY=80
 SF,
*NODE PRINT,NSET=N2,SUMMARY=NO,FREQUENCY=4
  U2, UR3, V2, VR3, A2, AR3
*NODE PRINT,FREQUENCY=80
 V2, VR3, A2, AR3
 RU2,RUR3,RV2,RVR3,RA2,RAR3
*MODAL PRINT,FREQUENCY=20
GU,
GV,
GA,
*MODAL FILE
GU,
*NODE FILE,FREQUENCY=1,NSET=N2
 U,V,A,RU,RV,RA
*OUTPUT,FIELD
*MODAL OUTPUT,VARIABLE=ALL
GU,
*OUTPUT,HISTORY
*MODAL OUTPUT,VARIABLE=ALL
GU,
*OUTPUT,FIELD,Frequency=1
*NODE OUTPUT,NSET=N2
 U,V,A,RU,RV,RA
*OUTPUT,HISTORY,Frequency=1
*NODE OUTPUT,NSET=N2
 U,V,A,RU,RV,RA
*END STEP
