*Heading
** Job name: CLoad_test Model name: Model-1
** Generated by: Abaqus/CAE 6.14-1
*Preprint, echo=NO, model=NO, history=NO, contact=NO
**
** PARTS
**
*Part, name=Part-1
*End Part
**
**
** ASSEMBLY
**
*Assembly, name=Assembly
**
*Instance, name=Part-1-1, part=Part-1
*Node
      1,  0.387499988,          0.5,           0.
      2,  0.287499994,          0.5,           0.
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*Element, type=S4R
  1,   1,   2,  13,  12
  2,   2,   3,  14,  13
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*Nset, nset=_PickedSet2, internal, generate
   1,  121,    1
*Elset, elset=_PickedSet2, internal, generate
   1,  100,    1
** Section: Section-1
*Shell Section, elset=_PickedSet2, material=Material-1
0.005, 5
*End Instance
**
*Nset, nset=NSET_ALL, instance=Part-1-1, generate
   1,  121,    1
*Nset, nset=NSET_LOAD, instance=Part-1-1
  13,  14,  15,  16,  17,  18
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*Nset, nset=_PickedSet6, internal, instance=Part-1-1
   1,   2,   3,   4,   5,   6
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*Elset, elset=_PickedSet6, internal, instance=Part-1-1
   1,   2,   3,   4,   5,   6
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*End Assembly
*Psd-definition, name=PSD
6.28, 0., 0.0001
6.28, 0., 1000.
**
** MATERIALS
**
*Material, name=Material-1
*Density
2711.,
*Elastic
 6.87e+10, 0.33
**
** BOUNDARY CONDITIONS
**
** Name: BC-1 Type: Displacement/Rotation
*Boundary
_PickedSet6, 1, 1
_PickedSet6, 2, 2
_PickedSet6, 3, 3
_PickedSet6, 4, 4
_PickedSet6, 5, 5
_PickedSet6, 6, 6
** ----------------------------------------------------------------
**
** STEP: Step-1
**
*Step, name=Step-1, nlgeom=NO, perturbation
*Frequency, eigensolver=Lanczos, acoustic coupling=on, normalization=displacement
20, , , , ,
**
** OUTPUT REQUESTS
**
*Restart, write, frequency=0
**
** FIELD OUTPUT: F-Output-1
**
*Output, field
*Node Output, nset=NSET_ALL, variable=PRESELECT
*Contact Output, nset=NSET_ALL, variable=PRESELECT
*End Step
** ----------------------------------------------------------------
**
** STEP: Step-2
**
*Step, name=Step-2, nlgeom=NO, perturbation
*Random Response
0.1, 500.0, 20, 1.,
*Modal Damping, modal=direct
1, 500, 0.01
*select eigenmodes, generate
1, 500
*cload
NSET_LOAD, 3, -2000
*correlation, type=moving noise
1, 6.0, 0.0, 0.0,PSD
**
** OUTPUT REQUESTS
**
**
** FIELD OUTPUT: F-Output-2
**
*Output, field, frequency=1
*Node Output, nset=NSET_ALL
A, RU, U, V
*Output, history, frequency=0
*End Step
